f1(x) := sin(x)/x
xL1 := -3*π
xR1 := 3*π
dx1 := π/36
xLW := 64
yLW := 128
f2(x) := x^3
xL2 := -5
xR2 := 5
dx2 := 0.25
xHW := 1024
yHW := 960
f3(x) := sqrt(x)*sin(x)
xL3 := 0
xR3 := 6*π
dx3 := dx1
f4(x) := x^2
xL4 := -10
xR4 := 10
dx4 := dx2
x1 := xL1 = -9.42478
f(x) := f1(x) → sin(x)/x
x2 := xR1 = 9.42478
Δx := dx1 = 0.0872665
_N := round((x2 - x1)/Δx) = 216
i := 0 .. _N
X[i] := x1 + Δx*i
Z[i] := 1
Y[i] := f(X[i])
xL := min(X) = -9.42478
xH := max(X) = 9.42478
yL := min(Y) = -0.217033
yH := max(Y) = 1
Ms := stack(transpose(X), transpose(Y), transpose(Z))
ΔxW := xHW - xLW = 960
ΔxX := xH - xL = 18.8496
ΔyW := yHW - yLW = 832
Δy := yH - yL = 1.21703
kx := ΔxW/ΔxX = 50.9296
ky := ΔyW/Δy = 683.63
Tsw := [kx, 0, xLW - kx*xL; 0, -ky, yHW + ky*yL; 0, 0, 1] = [50.9296, 0, 544; 0, -683.63, 811.63; 0, 0, 1]
Mw := Tsw*Ms
Xw := transpose(Mw)[:, 0]
Yw := -transpose(Mw)[:, 1]
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