Xa := 5
Ya := 2
XwL := 64
YwL := 480
Xb := 10
Yb := 12
XwH := 960
YwH := 960
Xc := 13
Yc := 8
ZX := [Xa; Xb; Xc]
ZY := [Ya; Yb; Yc]
XL := min(ZX) = 5
XH := max(ZX) = 13
YH := max(ZY) = 12
YL := min(ZY) = 2
ΔXW := XwH - XwL = 896
ΔX := XH - XL = 8
ΔYW := YwH - YwL = 480
ΔY := YH - YL = 10
kx := ΔXW/ΔX = 112
ky := ΔYW/ΔY = 48
Tsw := [kx, 0, XwL - kx*XL; 0, -ky, YwH + ky*YL; 0, 0, 1]
[XaW; YaW; q] := Tsw*[Xa; Ya; 1] = [64; 960; 1]
[XbW; YbW; q] := Tsw*[Xb; Yb; 1] = [624; 480; 1]
[XcW; YcW; q] := Tsw*[Xc; Yc; 1] = [960; 672; 1]
X := [Xa; Xb; Xc; Xa]
Y := [Ya; Yb; Yc; Ya]
XW := [XaW; XbW; XcW; XaW]
YW := -[YaW; YbW; YcW; YaW]
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